Vm_adc := 3.3
Vcc := 15
Vth := 3.5
# Analisis de la corriente y tension maxima por Rshunt
PRshunt := 5
Rs := 0.1
PR == V^2/R
Im := sqrt(PRshunt/Rs) = 7.07107
ImaxRs := 6.5
VmaxRs := Rs*ImaxRs = 0.65
Gain_Rs := Vm_adc/VmaxRs = 5.07692
# Para un op amp en modo diferencial
Vo == Vd*(R2/R1)
R2 := 4700
Gain_Rs == R2/R1 solve, R1 → 925.757575758
R1 := 1000
Vm_adc_Rs := VmaxRs*R2/R1 = 3.055
# Utilizar 1N4148 para sensor de temperatura
